# Representative production-AD point for Figure 5. M=12 is source-only:
# the full-source selector excludes it below the resolved-band threshold.
newton on
units real
atom_style full
read_data numerical_examples/water_trajectory_benchmark/water.data
reset_timestep 0

bond_style harmonic
angle_style harmonic
bond_coeff 1 0.0 1.000
angle_coeff 1 0.0 109.47
special_bonds lj/coul 0 0 0.5

pair_style coul/esp 9
kspace_style esp 0.0001 0.0001
kspace_modify order 5 mesh 12 12 12 diff ad cspread 12.023999999999999
pair_coeff * *


neighbor 1.0 bin
neigh_modify every 1 delay 0 check yes one 4000
thermo_style custom step atoms ecoul elong
thermo_modify flush yes
thermo 100

# The Figure-5 runner writes force dumps only under ESP_ERROR_BENCH_OUTPUT_DIR.
rerun numerical_examples/water_trajectory_benchmark/water_short_traj.lammpstrj dump x y z ix iy iz box yes format native
