# Native PPPM-AD calibration for Figure 5.
newton on
units real
atom_style full
read_data numerical_examples/water_trajectory_benchmark/water.data
reset_timestep 0

bond_style harmonic
angle_style harmonic
bond_coeff 1 0.0 1.000
angle_coeff 1 0.0 109.47
special_bonds lj/coul 0 0 0.5

neighbor 1.0 bin
neigh_modify every 1 delay 0 check yes one 2000
thermo_style custom step pe ecoul elong press
thermo_modify flush yes
thermo 1
pair_style coul/long 9.0
kspace_style pppm 1.0e-05
kspace_modify order 5
kspace_modify diff ad
pair_coeff * *

run 0
